*Heading
** Job name: Fiber21 Model name: Fiber21
** Generated by: Abaqus/CAE 6.13-1
*Preprint, echo=NO, model=NO, history=NO, contact=NO
**
** PARTS
**
*Part, name=skin_substrate
*Node
      1,           0., 0.00775667001
      2, 0.00999999978, 0.00775667001
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*Element, type=CAX4RH
   1,    1,    9,  681,  306
   2,    9,   10,  682,  681
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*Nset, nset=Set-32
    1,    2,    3,    4,    9,   10
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*Elset, elset=Set-32, generate
    1,  5100,     1
*Nset, nset=Set-33
     5,     6,     7,     8,   307,   308
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*Elset, elset=Set-33, generate
  5101,  12100,      1
*Nset, nset=Set-34
     1,     2,     5,     6,     9,    10
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*Elset, elset=Set-34, generate
 12101,  14100,      1
*Elset, elset=MCNC_el
 4901, 5001
** Section: skin
*Solid Section, elset=Set-32, material=skin
,
** Section: sylgard
*Solid Section, elset=Set-33, material=sylgard
,
** Section: nylon
*Solid Section, elset=Set-34, material=nylon
,
*End Part
**
*Part, name=tip
*End Part
**
**
** ASSEMBLY
**
*Assembly, name=Assembly
**
*Instance, name=skin_substrate-1, part=skin_substrate
          0.,    -0.008085,           0.
*End Instance
**
*Instance, name=tip-1, part=tip
*Node
      1,           0., 0.00200000009,           0.
*Nset, nset=tip-1-RefPt_, internal
1,
*Nset, nset=tip
 1,
*Surface, type=SEGMENTS, name=RigidSurface_, internal
START,           0.,        0.002
 LINE,       0.0005,        0.002
 LINE,       0.0005,        5e-05
 CIRCL,      0.00045,           0.,      0.00045,        5e-05
 LINE,           0.,           0.
*Rigid Body, ref node=tip-1-RefPt_, analytical surface=RigidSurface_
*End Instance
**
*Nset, nset=Set-5, instance=skin_substrate-1
   7,   8, 475, 476, 477, 478
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*Elset, elset=Set-5, instance=skin_substrate-1, generate
 12001,  12100,      1
*Nset, nset=Set-6, instance=tip-1
 1,
*Nset, nset=_PickedSet8, internal, instance=tip-1
 1,
*Nset, nset=_PickedSet11, internal, instance=tip-1
 1,
*Nset, nset=_PickedSet15, internal, instance=skin_substrate-1
   1,   4,   6,   7, 257, 258
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*Elset, elset=_PickedSet15, internal, instance=skin_substrate-1
     1,   101,   201,   301,   401,   501
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*Elset, elset=_s_Surf-3_S3, internal, instance=skin_substrate-1, generate
 5001,  5100,     1
*Surface, type=ELEMENT, name=s_Surf-3
_s_Surf-3_S3, S3
*End Assembly
*Amplitude, name=LiftCurve
             0.,              1., 0.0127355071901998, 0.999224376731302, 0.0254710143803996, 0.992686980609418, 0.0382065215705994, 0.980387811634349
0.0509420287607993, 0.962326869806094, 0.0636775359509991, 0.938504155124654, 0.0764130431411989, 0.908919667590028, 0.0891485503313987, 0.873573407202216
0.101884057521599, 0.832465373961219, 0.114619564711798, 0.785595567867036, 0.127355071901998, 0.732963988919668, 0.140090579092198, 0.674570637119114
0.152826086282398, 0.610415512465374, 0.165561593472598, 0.540498614958449, 0.178297100662797, 0.464819944598338, 0.191032607852997, 0.383379501385042
0.203768115043197, 0.29617728531856, 0.216503622233397, 0.203213296398892, 0.229239129423597, 0.104487534626039, 0.241974636613796,              0.
*Amplitude, name=RampCurve
             0.,              0., 0.0127355071901998, 0.104487534626039, 0.0254710143803996, 0.203213296398892, 0.0382065215705994, 0.29617728531856
0.0509420287607993, 0.383379501385042, 0.0636775359509991, 0.464819944598338, 0.0764130431411989, 0.540498614958449, 0.0891485503313987, 0.610415512465374
0.101884057521599, 0.674570637119114, 0.114619564711798, 0.732963988919668, 0.127355071901998, 0.785595567867036, 0.140090579092198, 0.832465373961219
0.152826086282398, 0.873573407202216, 0.165561593472598, 0.908919667590028, 0.178297100662797, 0.938504155124654, 0.191032607852997, 0.962326869806094
0.203768115043197, 0.980387811634349, 0.216503622233397, 0.992686980609418, 0.229239129423597, 0.999224376731302, 0.241974636613796,              1.
**
** MATERIALS
**
*Material, name=nylon
*Hyperelastic, ogden
42368.,          9., 2.36027e-06
*Material, name=skin
*Hyperelastic, ogden, moduli=INSTANTANEOUS
 4623.26,       7.707, 2.16297e-05
*Viscoelastic, time=PRONY
 0.076,    0.,  0.06
  0.45,    0., 0.726
*Material, name=sylgard
*Hyperelastic, neo hooke, moduli=INSTANTANEOUS
105000., 4.7619e-06
*Viscoelastic, time=PRONY
 0.03,  0., 0.7
**
** INTERACTION PROPERTIES
**
*Surface Interaction, name=IntProp-1
1.,
*Friction
0.,
*Surface Behavior, pressure-overclosure=HARD
**
** BOUNDARY CONDITIONS
**
** Name: axisymmetricEdge Type: Displacement/Rotation
*Boundary
_PickedSet15, 1, 1
** Name: horizontalBottom Type: Displacement/Rotation
*Boundary
Set-5, 2, 2
** Name: verticalTip Type: Displacement/Rotation
*Boundary
_PickedSet8, 1, 1
_PickedSet8, 6, 6
**
** INTERACTIONS
**
** Interaction: skinTip
*Contact Pair, interaction=IntProp-1, type=SURFACE TO SURFACE
s_Surf-3, tip-1.RigidSurface_
** ----------------------------------------------------------------
**
** STEP: ramp
**
*Step, name=ramp, nlgeom=YES, amplitude=RAMP, inc=10000000, unsymm=YES
*Visco, cetol=0.01
0.0001, 0.241975, 1.035e-08, 0.01
**
** BOUNDARY CONDITIONS
**
** Name: movingIndenter Type: Displacement/Rotation
*Boundary, amplitude=RampCurve
_PickedSet11, 2, 2, -6.46485e-05
**
** INTERACTIONS
**
** Contact Controls for Interaction: skinTip
*Contact Controls, master=tip-1.RigidSurface_, slave=s_Surf-3, reset
**
** OUTPUT REQUESTS
**
*Restart, write, frequency=0
*Print, solve=NO
**
** FIELD OUTPUT: F-Output-1
**
*Output, field
*Node Output
CF, RF, U
*Element Output, directions=YES
CE, CEEQ, CEMAG, E, ELEDEN, ELEN, ENER, LE, PE, PEEQ, PEMAG, S
*Contact Output
CDISP, CSTRESS
**
** HISTORY OUTPUT: H-Output-1
**
*Output, history, variable=PRESELECT
*End Step
** ----------------------------------------------------------------
**
** STEP: hold
**
*Step, name=hold, nlgeom=YES, amplitude=RAMP, inc=10000, unsymm=YES
*Visco, cetol=0.01
0.001, 5., 5e-07, 0.5
**
** OUTPUT REQUESTS
**
*Restart, write, frequency=0
**
** FIELD OUTPUT: F-Output-1
**
*Output, field
*Node Output
CF, RF, U
*Element Output, directions=YES
CE, CEEQ, CEMAG, E, ELEDEN, ELEN, ENER, LE, PE, PEEQ, PEMAG, S
*Contact Output
CDISP, CSTRESS
**
** HISTORY OUTPUT: H-Output-1
**
*Output, history, variable=PRESELECT
*End Step
